freq[0] := 6  # disabled
freq[0] := 4
amp[0] := 19
NS := 100000
NF := 11
freq[1] := 60  # disabled
freq[1] := 10
amp[1] := 17
dfreq := 200000
freq[2] := 80  # disabled
freq[2] := 69
amp[2] := 15
dtime := 1/dfreq = 5e-6
freq[3] := 100  # disabled
freq[3] := 243
amp[3] := 13
dn := dfreq/NS = 2
freq[4] := 200  # disabled
freq[4] := 1000
amp[4] := 11
i := 0, 1 .. NS
freq[5] := 300  # disabled
freq[5] := 2635
amp[5] := 9
ns[i] := 1 + i
freq[6] := 400  # disabled
freq[6] := 6666
amp[6] := 7
time[i] := ns[i]*dtime
freq[7] := 500  # disabled
freq[7] := 13566
amp[7] := 5
freq[8] := 600  # disabled
freq[8] := 50000
amp[8] := 3
freq[9] := 800  # disabled
freq[9] := 75000
amp[9] := 2
freq[10] := 1000  # disabled
freq[10] := 99666
amp[10] := 1
f(x) := sum(amp[i]*(cos(2*π*freq[i]*x) + 1), i = 0 .. NF - 1)
s[i] := f(time[i])
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sc := ceil(s)
sum(ceil(s[i]), i = 0 .. NS)/NS = 102.501
logFreq(amp) :=
    for iii ∈ 0, 1 .. NF - 1
        v[iii] ← 0 if amp[iii] == 0
        v[iii] ← 1 otherwise
    return v
S(freq) :=
    k ← freq/dn
    alpha ← 2*cos(2*π*k/NS)
    Wre ← cos(2*π*k/NS)
    Wim ← sin(2*π*k/NS)
    vm1 ← 0
    vm2 ← 0
    for iii ∈ 0, 1 .. NS - 1
        scp[iii] ← sc[iii]*13/256
        v[iii] ← scp[iii] + alpha*vm1 - vm2 if iii == 0
        v[iii] ← scp[iii] + alpha*v[iii - 1] - vm1 if iii == 1
        v[iii] ← scp[iii] + alpha*v[iii - 1] - v[iii - 2] otherwise
        iii ← iii + 1
    vWre ← v[NS - 1]*Wre - v[NS - 2]
    vWim ← v[NS - 1]*Wim
    S ← (vWre^2 + vWim^2)*(39.3939/NS)^2
    M[0] ← S
    M[1] ← v
    M[2] ← Wre
    M[3] ← Wim
    M[4] ← vWre
    M[5] ← vWim
    M[6] ← alpha
    return M
S(freq[8])[1] =  # no stored result
S(freq[8])[6] = 1.22461e-16
# [component: outputs vdata]
i := 0, 1 .. NF - 1
S[i] := S(freq[i])[0]
lF := logFreq(amp)
vdata = [371; 290; 231; 169; 120; 81; 49; 24; 9; 4; 1]
amp = [19; 17; 15; 13; 11; 9; 7; 5; 3; 2; 1]
trunc(sqrt(S)) = [19; 17; 15; 13; 11; 9; 7; 4; 3; 2; 1]
cos(2*π*50000/2/NS) = 6.12303e-17
sin(2*π*50000/2/NS) = 1
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sc =  # no stored result
freq = [4; 10; 69; 243; 1000; 2635; 6666; 13566; 50000; 75000; 99666]
lF = [1; 1; 1; 1; 1; 1; 1; 1; 1; 1; 1]
ceil(S) = [362; 290; 232; 170; 122; 82; 50; 25; 10; 5; 2]
# D:\Desktop\Study_now\SRW\GoertzelAlgorithm\src\sim\data\sample.csv
# D:\Desktop\Study_now\SRW\GoertzelAlgorithm\src\sim\data\freq.csv
# D:\Desktop\Study_now\SRW\GoertzelAlgorithm\src\sim\data\logic.csv
# D:\Desktop\Study_now\SRW\GoertzelAlgorithm\src\sim\data\data.csv
i := 0, 1 .. NS
S1 := CFFT(sc)
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